// COMSOL Multiphysics 5.3.0.260 model "Prueba1.mph"
// sin título
// Outline of the model tree

Geometry
  geom1 "Geometría 1" (3D, length unit m)
    blk1: Block "Bloque 1" | size = {1e-3, 3e-4, 1e-3}
    blk2: Block "Bloque 2" | pos = {2e-3, 0, 0}; size = {1e-3, 3e-4, 1e-3}
    blk3: Block "Bloque 3" | pos = {-3e-3, 0, 0}; size = {2e-3, 3e-4, 1e-3}
    blk4: Block "Bloque 4" | pos = {4e-3, 0, 0}; size = {2e-3, 3e-4, 1e-3}
    fin: Finalize "Formar unión"

Materials
  mat1: Common "Iman" on domains 2, 3
    def "Básico"
      relpermeability = 4000
  mat2: Common "Nickel [solid,annealed]" on domains 1, 4
    def "Básico"
      thermalconductivity = k_solid_1(T[1/K])[W/(m*K)]
      resistivity = res_solid_1(T[1/K])[ohm*m]
      Syt = Syt_solid_annealed_1(T[1/K])[Pa]
      thermalexpansioncoefficient = (alpha_solid_1(T[1/K])[1/K]+(Tempref-293[K])*if(abs(T-Tempref)>1e-3,(alpha_solid_1(T[1/K])[1/K]-alpha_solid_1(Tempref[1/K])[1/K])/(T-Tempref),d(alpha_solid_1(T[1/K])[1/K],T)))/(1+alpha_solid_1(Tempref[1/K])[1/K]*(Tempref-293[K]))
      heatcapacity = C_solid_1(T[1/K])[J/(kg*K)]
      electricconductivity = sigma_solid_1(T[1/K])[S/m]
      HC = HC_solid_1(T[1/K])[J/(mol*K)]
      VP = VP_solid_1(T[1/K])[Pa]
      emissivity = epsilon(T[1/K])
      density = rho_solid_1(T[1/K])[kg/m^3]
      elong = elong_solid_annealed_1(T[1/K])
      relpermeability = 600
      k_solid_1: Piecewise "Por secciones 1"
        arg = T
        pieces = 
          {0.0, 18.0, 214.0436*T^1+2.199849*T^2-0.4089829*T^3-0.02700268*T^4+0.001304208*T^5}
          {18.0, 34.5, -5208.712+1431.939*T^1-103.9216*T^2+3.410781*T^3-0.05321568*T^4+3.189215E-4*T^5}
          {34.5, 75.1, 4648.872-225.3013*T^1+4.520693*T^2-0.0414926*T^3+1.439157E-4*T^4}
          {75.1, 205.0, 904.9102-16.54678*T^1+0.1325449*T^2-4.75388E-4*T^3+6.33262E-7*T^4}
          {205.0, 631.0, 185.3755-0.6437058*T^1+0.00164864*T^2-2.193597E-6*T^3+1.131921E-9*T^4}
          {631.0, 1500.0, 50.42098+0.02143115*T^1}
      res_solid_1: Piecewise "Por secciones 1a"
        arg = T
        pieces = 
          {100.0, 633.0, -3.610912E-8+5.575728E-10*T^1-1.189788E-12*T^2+1.811005E-15*T^3}
          {633.0, 800.0, 5.696199E-8+4.544983E-10*T^1-1.128754E-13*T^2}
          {800.0, 1300.0, 9.614177E-8+3.152233E-10*T^1}
          {1300.0, 1715.0, 1.06E-7+3.456E-10*T^1-2.92E-14*T^2}
      Syt_solid_annealed_1: Piecewise "Por secciones 1b"
        arg = T
        pieces = 
          {77.0, 644.0, 7.215399E8-2463963.0*T^1+5666.31*T^2-5.387338*T^3+0.001198245*T^4}
          {644.0, 1088.0, 6.106184E8-477284.4*T^1-235.4998*T^2+0.1737128*T^3}
      alpha_solid_1: Piecewise "Por secciones 1c"
        arg = T
        pieces = 
          {0.0, 255.0, 7.613874E-6+3.35753E-8*T^1-5.879278E-11*T^2}
          {255.0, 500.0, 7.24503E-6+4.503271E-8*T^1-1.564717E-10*T^2+2.721998E-13*T^3-1.695788E-16*T^4}
          {500.0, 1173.0, 4.931202E-6+3.05557E-8*T^1-2.958128E-11*T^2+1.004274E-14*T^3}
      C_solid_1: Piecewise "Por secciones 1d"
        arg = T
        pieces = 
          {100.0, 599.0, -90.38582+4.504691*T^1-0.01467413*T^2+2.223124E-5*T^3-1.187679E-8*T^4}
          {599.0, 631.0, -29261.06+162.9617*T^1-0.2972179*T^2+1.809085E-4*T^3}
          {631.0, 700.0, 8011.774-20.08609*T^1+0.01341446*T^2}
          {700.0, 1728.0, 572.5331-0.2122174*T^1+2.399215E-4*T^2-5.186512E-8*T^3}
      sigma_solid_1: Piecewise "Por secciones 1e"
        arg = T
        pieces = 
          {100.0, 633.0, 1/(1.811005E-15*T^3-1.189788E-12*T^2+5.575728E-10*T-3.610912E-08)}
          {633.0, 800.0, 1/(-1.128754E-13*T^2+4.544983E-10*T+5.696199E-08)}
          {800.0, 1300.0, 1/(3.152233E-10*T+9.614177E-08)}
          {1300.0, 1715.0, 1/(-2.920000E-14*T^2+3.456000E-10*T+1.060000E-07)}
      HC_solid_1: Piecewise "Por secciones 1f"
        arg = T
        pieces = 
          {100.0, 599.0, -5.305647+0.2644255*T^1-8.613714E-4*T^2+1.304974E-6*T^3-6.971678E-10*T^4}
          {599.0, 631.0, -1717.624+9.565854*T^1-0.01744669*T^2+1.061933E-5*T^3}
          {631.0, 700.0, 470.2912-1.179054*T^1+7.874292E-4*T^2}
          {700.0, 1728.0, 32.82242-0.01014919*T^1+1.190822E-5*T^2-2.385652E-9*T^3}
      VP_solid_1: Piecewise "Por secciones 1g" | arg = T; pieces = {293.0, 1728.0, (exp((-2.260600e+04/T-8.717000e-01*log10(T)+1.343781e+01)*log(10.0)))*1.333200e+02}
      epsilon: Piecewise "Por secciones" | arg = T; pieces = {245.0, 1093.0, 0.05021919+2.137239E-4*T^1-2.976342E-7*T^2+1.846619E-10*T^3}
      rho_solid_1: Piecewise "Por secciones 1h"
        arg = T
        pieces = 
          {0.0, 30.0, 8960.466}
          {30.0, 280.0, 8959.339+0.08118937*T^1-0.001509887*T^2+1.865826E-6*T^3}
          {280.0, 1173.0, 8957.209-0.01644238*T^1-7.716327E-4*T^2+6.255458E-7*T^3-1.883567E-10*T^4}
      elong_solid_annealed_1: Piecewise "Por secciones 1i" | arg = T; pieces = {77.0, 1088.0, 80.39804-0.134346*T^1+1.823587E-4*T^2-1.545278E-8*T^3-3.859654E-11*T^4}
    ThermalExpansion "Expansión térmica"
      alphatan = CTE(T[1/K])[1/K]
      dL = (dL_solid_1(T[1/K])-dL_solid_1(Tempref[1/K]))/(1+dL_solid_1(Tempref[1/K]))
      alphatanIso = CTE(T)
      dLIso = (dL_solid_1(T)-dL_solid_1(Tempref))/(1+dL_solid_1(Tempref))
      dL_solid_1: Piecewise "Por secciones 1"
        arg = T
        pieces = 
          {0.0, 30.0, -0.002241764}
          {30.0, 240.0, -0.002199851-3.015419E-6*T^1+5.600574E-8*T^2-6.870731E-11*T^3}
          {240.0, 1173.0, -0.003925081+1.848384E-5*T^1-3.75054E-8*T^2+9.133189E-11*T^3-8.532584E-14*T^4+2.807789E-17*T^5}
      CTE: Piecewise "Por secciones"
        arg = T
        pieces = 
          {50.0, 350.0, -5.87011E-6+1.938799E-7*T^1-8.26993E-10*T^2+1.664025E-12*T^3-1.249417E-15*T^4}
          {350.0, 635.0, 3.858532E-6+5.641275E-8*T^1-1.218844E-10*T^2+1.07478E-13*T^3}
          {635.0, 650.0, 7.005974E-4-2.020734E-6*T^1+1.489546E-9*T^2}
          {650.0, 800.0, 4.61122E-5-7.991209E-8*T^1+5.274725E-11*T^2}
    Enu "Módulo de Young y coeficiente de Poisson"
      youngsmodulus = E(T[1/K])[Pa]
      poissonsratio = nu(T[1/K])
      E: Piecewise "Por secciones"
        arg = T
        pieces = 
          {0.0, 773.0, 2.198604E11-4.976173E7*T^1-6940.452*T^2}
          {773.0, 1323.0, 3.675636E11-5.264939E8*T^1+511021.8*T^2-191.9755*T^3}
      nu: Piecewise "Por secciones 2" | arg = T; pieces = {293.0, 773.0, 0.2970106-4.70622E-5*T^1+3.902138E-8*T^2}
    KG "Módulo de compresibilidad y módulo de rigidez"
      K = kappa(T[1/K])[Pa]
      G = mu(T[1/K])[Pa]
      mu: Piecewise "Por secciones" | arg = T; pieces = {293.0, 773.0, 8.483201E10-1.654608E7*T^1-5055.849*T^2}
      kappa: Piecewise "Por secciones 2" | arg = T; pieces = {293.0, 773.0, 1.789167E11-7.188841E7*T^1+22477.8*T^2}
    ElastoplasticModel "Modelo de material elastoplástico"
      sigmags = Sys_solid_annealed_1(T[1/K])[Pa]
      Hillcoefficients = {0, 0, 0, 0, 0, 0}
      ys = {0, 0, 0, 0, 0, 0}
      Sys_solid_annealed_1: Piecewise "Por secciones 1" | arg = T; pieces = {77.0, 1088.0, 1.42427E8-320861.9*T^1+678.0062*T^2-0.7322205*T^3+2.658365E-4*T^4}

Physics
  mfnc: MagnetostaticsNoCurrents "Campos magnéticos, sin corrientes" on all domains
    dependent variable Vm
    mfc1: MagneticFluxConservation "Conservación del campo magnético 1" (default)
      ConstitutiveRelationH = Magnetization
      M = {750e3, 0, 0}
    mi1: MagneticInsulation "Aislamiento magnético 1" (default)
    init1: init "Valores iniciales 1" (default)
    zsp1: ZeroMagneticScalarPotential "Potencial escalar magnético nulo 1" on boundaries 1-6, 19-24
    fcal1: ForceCalculation "Cálculo de fuerza 1" on domains 1, 4 | ForceName = niquel

Mesh
  mesh1 "Malla 1"
    size: MeshSizeDefault "Tamaño" | hauto = 4
    ftet1: FreeTet "Tetraédrico libre 1" on remaining entities
      size1: Size "Tamaño 1" on domains 2, 3 | hmax = 0.0025; custom = on
  mesh2 "Malla 2" (physics-controlled)

Studies
  std1 "Estudio 1"
    stat: Stationary "Estacionario"

Solver configurations
  sol1 "Solución 1" (study std1)
    v1: Variables "Variables dependientes 1"
    s1: Stationary "Resolvedor estacionario 1"
      fc1: FullyCoupled "Completamente acoplado 1" | linsolver = i1
      i1: Iterative "Iterativo 1" | linsolver = cg
        mg1: Multigrid "Multimalla 1" | prefun = amg

Datasets
  dset1: Solution | solution = sol1

Plots
  pg1: PlotGroup3D "Grupo gráfico 3D 1" | data = dset1
    slc1: Slice "Corte 1"
      expr = mfnc.normB
      descr = Densidad de flujo magnético, norma
      quickplane = xy
      quickzmethod = coord
      quickz = 0.005
    vol1: Volume "Volumen 1" | expr = mfnc.Hy; descr = Campo magnético, componente y