// COMSOL Multiphysics 5.3.0.260 model "3ImanNiquel_distancia.mph"
// sin título
// Outline of the model tree

Geometry
  geom1 "Geometría 1" (3D, length unit m)
    blk1: Block "Iman" | size = {1e-3, 0.5e-3, 3e-4}
    blk2: Block "Niquel" | pos = {1.2e-3, 0, 0}; size = {2e-3, 0.5e-3, 3e-4}
    co1: Compose "Componer 1" (disabled) | input = blk1, blk2; formula = blk3+(blk1+blk2)*blk3
    blk6: Block "Bloque 6" | pos = {-1e-3, 0, 0}; size = {4.5e-3, 1e-3, 0.5e-3}
    co2: Compose "Componer 2" | input = blk1, blk2, blk6; formula = blk6 +(blk1+blk2)*blk6
    fin: Finalize "Formar unión"

Materials
  mat1: Common "Iron" on domains 2
    def "Básico"
      relpermeability = 5000
  mat2: Common "Niquel" on domains 3
    def "Básico"
      relpermeability = 600
  mat3: Common "Aire" on domains 1
    def "Básico"
      relpermeability = 1

Physics
  mfnc: MagnetostaticsNoCurrents "Campos magnéticos, sin corrientes" on all domains
    dependent variable Vm
    mfc1: MagneticFluxConservation "Conservación del campo magnético 1" (default)
    mi1: MagneticInsulation "Aislamiento magnético 1" (default)
    init1: init "Valores iniciales 1" (default)
    mfc2: MagneticFluxConservation "Conservación del campo magnético 2" on domains 2
      ConstitutiveRelationH = Magnetization
      M = {750, 0, 0}
    zsp1: ZeroMagneticScalarPotential "Potencial escalar magnético nulo 1" on boundaries 7, 13
    fcal1: ForceCalculation "Niquel" on domains 3 | ForceName = niquel

Mesh
  mesh1 "Malla 1"
    size: MeshSizeDefault "Tamaño" | hmax = 3.6E-4; hmin = 4.5E-5; hauto = 4
    ftet1: FreeTet "Tetraédrico libre 1" on remaining entities
      size1: Size "Tamaño 1" on domains 2, 3 | hmax = 0.00009; custom = on

Studies
  std1 "Estudio 1"
    stat: Stationary "Estacionario"

Solver configurations
  sol1 "Solución 1" (study std1)
    v1: Variables "Variables dependientes 1"
    s1: Stationary "Resolvedor estacionario 1"
      fc1: FullyCoupled "Completamente acoplado 1" | linsolver = i1
      i1: Iterative "Iterativo 1" | linsolver = cg
        mg1: Multigrid "Multimalla 1" | prefun = amg

Datasets
  dset1: Solution | solution = sol1
  mir1: Mirror3D "Symmetry Condition" | data = dset1; quickplane = xy
  mir2: Mirror3D "Antisymmetry Condition" | data = mir1; quickplane = zx

Derived values
  gev1: EvalGlobal "Evaluación global 1"
    data = dset1
    table = tbl4
    expr = {mfnc.Forcex_niquel, mfnc.Forcex_niquel*2}
    unit = {N, N}
    descr = {"Fuerza electromagnética (#0), componente #1, componente x", Fuerza}

Tables
  tbl1: Table "Tabla 1"
    // Evaluación global 1 (mfnc.Forcex_0, mfnc.Forcex_0*4)
    Fuerza electromagnética (#0), componente #1, componente x (N) | Total Force (N) | Fuerza electromagnética (#0), componente #1, componente x (N) | Total Force (N) | Fuerza electromagnética (#0), componente #1, componente x (N) | Total Force (N) | Fuerza electromagnética (#0), componente #1, componente x (N) | Total Force (N) | Fuerza electromagnética (#0), componente #1, componente x (N) | Total Force (N) | Fuerza electromagnética (#0), componente #1, componente x (N) | Total Force (N)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
    -2.70412e-10 | -1.08165e-09 | -3.57399e-09 | -1.42959e-08 | -7.90136e-09 | -3.16054e-08 | -7.90136e-09 | -3.16054e-08 | -3.57399e-09 | -1.42959e-08 | -3.57399e-09 | -7.14797e-09
  tbl2: Table "Tabla 2"
    // Evaluación global 1 (mfnc.Forcex_niquel, mfnc.Forcex_niquel*2)
    Fuerza electromagnética (#0), componente #1, componente x (N) | Total (N)
    -3.57399e-09 | -7.14797e-09
  tbl3: Table "Tabla 3"
    // Evaluación global 1 (mfnc.Forcex_niquel, mfnc.Forcex_niquel*2)
    Fuerza electromagnética (#0), componente #1, componente x (N) | sf (N) | Fuerza electromagnética (#0), componente #1, componente x (N) | sf (N) | Fuerza electromagnética (#0), componente #1, componente x (N) | sf (N) | Fuerza electromagnética (#0), componente #1, componente x (N) | sf (N) | Fuerza electromagnética (#0), componente #1, componente x (N) | Magnetic Force (N) | Fuerza electromagnética (#0), componente #1, componente x (N) | Magnetic Force (N)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
    -1.28536e-08 | -2.57073e-08 | -3.71523e-09 | -7.43045e-09 | -3.71523e-09 | -7.43045e-09 | -3.71523e-09 | -7.43045e-09 | 3.02367e-09 | 6.04734e-09 | 3.02367e-09 | 6.04734e-09
  tbl4: Table "Tabla 4"
    // Evaluación global 1 (mfnc.Forcex_niquel, mfnc.Forcex_niquel*2)
    Fuerza electromagnética (#0), componente #1, componente x (N) | Fuerza (N)
    -2.9064e-11 | -5.8128e-11

Plots
  pg1: PlotGroup3D "Grupo gráfico 3D 1" | data = mir1
    slc1: Slice "Corte 1"
      data = mir2
      expr = mfnc.normB
      descr = Densidad de flujo magnético, norma
      quickplane = xy
      quickzmethod = coord
      quickz = 5e-6
      quickznumber = 5e-6
      quickxmethod = coord
      quickx = 0.00005
    arwv1: ArrowVolume "Volumen de flechas 1"
      data = mir2
      expr = {mfnc.Bx, mfnc.By, mfnc.Bz}
      descr = Densidad de flujo magnético
      xnumber = 50
      ynumber = 30
      arrowzmethod = coord
      znumber = 10
      zcoord = 5e-6
      arrowlength = logarithmic
  pg2: PlotGroup3D "Grupo gráfico 3D 2" | data = mir2
    str1: Streamline "Línea de Flujo 1" | data = mir2; expr = {mfnc.Mx, mfnc.My, mfnc.Mz}; descr = Magnetización
    con1: Contour "Curva de nivel 1" | data = mir2; expr = mfnc.normB; descr = Densidad de flujo magnético, norma
  pg3: PlotGroup3D "Grupo gráfico 3D 3" | data = mir2
    iso1: Isosurface "Isosuperficie 1" | expr = mfnc.Hx; descr = Campo magnético, componente x
    con1: Contour "Curva de nivel 1" | expr = mfnc.Bx; descr = Densidad de flujo magnético, componente x
    con2: Contour "Curva de nivel 2" | data = mir2; expr = mfnc.normB; descr = Densidad de flujo magnético, norma
  pg4: PlotGroup3D "Grupo gráfico 3D 4" | data = mir2